# ADS7853 Anti-Alias Filter Calculations
# Datasheet Specifications | User-Defined Specifications | User-Defined Functions
V_ref := 2.5 V
f_in := 100 kHz
N := 14
C_FLT := 8.2 nF
V_lsb := V_ref/2^N = 152.588 μV
t_clk := 29.4 ns
t_conv := 450 ns
t_acq := (33*t_clk) - t_conv = 520.2 ns
C_DAC := 40 pF
# Calculations (f_(in)) | Calculations (DC)
V_step := (2*π*f_in*V_ref*t_conv*C_DAC)/(C_FLT + C_DAC) = 3.43135 mV
V_step_dc := (V_ref*C_DAC)/(C_FLT + C_DAC) = 12.1359 mV
V_half_lsb := V_ref/2^(N + 1) = 76.2939 μV
N_TC := ln(V_step/V_half_lsb) = 3.80612
N_TC_dc := ln(V_step_dc/V_half_lsb) = 5.06933
τ := t_acq/N_TC = 136.675 ns
τ_dc := t_acq/N_TC_dc = 102.617 ns
f_BW := 1/(2*π*τ) = 1.16448 MHz
f_BW_dc := 1/(2*π*τ_dc) = 1.55096 MHz
R_FLT := 1/(2*π*f_BW*C_FLT) = 16.6677 Ω
R_FLT := 1/(2*π*f_BW_dc*C_FLT) = 12.5143 Ω
# References
# - https://www.analog.com/en/analog-dialogue/articles/front-end-amp-and-rc-filter-design.html
# - https://www.youtube.com/playlist?list=PLiwaj4qabLWwQX_6dzznaH8Sgr7q1_pAS
# ADS7853 Error Estimation - AD8421 + LT6236 Front End
# Noise
# AD8421 Design Specifications: | Evaluation Frequency: | LT6236 Design Specifications:
f_eval := 100 KHz
e_ni_8421 := 3.7*nV/sqrt(Hz)
e_ni_6263 := 1.7*nV/sqrt(Hz)
# Global Constants:
k := 1.38*10^-23 J/K
e_no_8421 := 60*nV/sqrt(Hz)
T := 300 K
R_1 := 1.5 kΩ
R_2 := 1 kΩ
c_n_8421 := 0.2*pA/sqrt(Hz)
# LT6236 Calculations:
G := 10
R_1_noise := (4*k*T*R_1)^(1/2) = 4.98397 nV/sqrt(Hz)
R_G := 1.1 kΩ
R_2_noise := (4*k*T*R_2)^(1/2) = 4.0694 nV/sqrt(Hz)
# AD8421 Calculations:
R_G_noise := (4*k*T*R_G)^(1/2) = 4.26802 nV/sqrt(Hz)
e_n_total_6263 := sqrt(e_ni_6263^2 + R_1_noise^2 + R_2_noise^2) = 6.65507 nV/sqrt(Hz)
e_n_total_8421 := sqrt((e_no_8421/G)^2 + e_ni_8421^2 + R_G_noise^2) = 8.24051 nV/sqrt(Hz)
error_lsb := ((e_n_total_8421 + e_n_total_6263)*sqrt(f_eval))/V_lsb = 0.0308701
# References
# - http://www.ecircuitcenter.com/Circuits/Noise/Noise_Analysis/res_noise.htm
